Simulations: Version=126
  DataStore
    ExcelInput Observed: FileNames=[Observed.xlsx]; SheetNames=[Observed]
    PredictedObserved: PredictedTableName=Report; ObservedTableName=Observed; FieldNameUsedForMatch=Clock.Today; AllColumns=false
  Folder Radiation
    Simulation WaggaRadiation
      Clock: Start=2018-01-01; End=2018-06-30
      Summary SummaryFile
      Weather: FileName=Wagga2018.met
      MicroClimate: a_interception=0; b_interception=1; c_interception=0; d_interception=0; soil_albedo=0.3; SoilHeatFluxFraction=0.4; MinimumHeightDiffForNewLayer=0; NightInterceptionFraction=0.5; ReferenceHeight=2
      SoilArbitrator
      Zone Field: Area=1; Slope=0; AspectAngle=0; Altitude=50
        Report: EventNames=[Clock].DoReport
          VariableNames:
            [Clock].Today
            [Weather].Radn
            [Weather].Qmax
            [Weather].DiffuseFraction
        Fertiliser
        Soil: ASCOrder=Vertosol; ASCSubOrder=Black; SoilType=Clay; Site=Norwin; NearestTown=Norwin; Region=Darling Downs and Granite Belt; State=Queensland; Country=Australia; NaturalVegetation=Qld. Bluegrass, possible Qld. Blue gum; ApsoilNumber=900; Latitude=-27.581836; Longitude=151.320206; LocationAccuracy=+/- 20m
          DataSource=CSIRO Sustainable Ecosystems, Toowoomba; Characteriesd as part of the GRDC funded project"Doing it better, doing it smarter, managing soil water in Australian agriculture' 2011
          Comments=OC, CLL for all crops estimated-based on Bongeen Mywybilla Soil No1
          Physical
            Thickness  BD       AirDry    LL15      DUL       SAT       KS
            150        1.01056  0.13025   0.2605    0.521     0.588655  20
            150        1.07146  0.198689  0.248362  0.496723  0.565677  20
            300        1.09394  0.28      0.28      0.488438  0.557193  20
            300        1.15861  0.28      0.28      0.480297  0.532787  20
            300        1.17301  0.28      0.28      0.471584  0.527354  20
            300        1.16287  0.28      0.28      0.457071  0.53118   20
            300        1.1875   0.28      0.28      0.452332  0.521888  20
            SoilCrop WheatSoil: LL=[0.261, 0.248, 0.28, 0.306, 0.36, 0.392, 0.446]; KL=[0.06, 0.06, 0.06, 0.04, 0.04, 0.02, 0.01]; XF=[1, 1, 1, 1, 1, 1, 1]
          WaterBalance SoilWater: SummerDate=1-Nov; SummerU=5; SummerCona=5; WinterDate=1-Apr; WinterU=5; WinterCona=5; DiffusConst=40; DiffusSlope=16; Salb=0.12; CN2Bare=73; CNRed=20; CNCov=0.8; Thickness=[150, 150, 300, 300, 300, 300, 300]; SWCON=[0.3, 0.3, 0.3, 0.3, 0.3, 0.3, 0.3]
          Organic: FOMCNRatio=40
            Thickness  Carbon  SoilCNRatio  FBiom  FInert  FOM
            150        1.2     12           0.04   0.4     347.129
            150        0.96    12           0.02   0.6     270.344
            300        0.6     12           0.02   0.8     163.972
            300        0.3     12           0.02   1       99.4541
            300        0.18    12           0.01   1       60.322
            300        0.12    12           0.01   1       36.5871
            300        0.12    12           0.01   1       22.1912
          Chemical
            Thickness  NO3N  NH4N  PH
            150        1     0.1   8
            150        1     0.1   8
            300        1     0.1   8
            300        1     0.1   8
            300        1     0.1   8
            300        1     0.1   8
            300        1     0.1   8
          InitialWater: PercentMethod=1; FractionFull=1
          Sample InitialN: Thickness=[150, 150, 300, 300, 300, 300, 300]; SWUnits=Volumetric; OCUnits=Total; PHUnits=Water
          CERESSoilTemperature Temperature
          Nutrient
        SurfaceOrganicMatter: InitialResidueName=wheat_stubble; InitialResidueType=wheat; InitialResidueMass=500; InitialStandingFraction=0; InitialCPR=0; InitialCNR=100
    Simulation DarwinRadiation
      Clock: Start=2020-01-01; End=2020-06-29
      Summary SummaryFile
      Weather: FileName=Darwin2020.met
      MicroClimate: a_interception=0; b_interception=1; c_interception=0; d_interception=0; soil_albedo=0.3; SoilHeatFluxFraction=0.4; MinimumHeightDiffForNewLayer=0; NightInterceptionFraction=0.5; ReferenceHeight=2
      SoilArbitrator
      Zone Field: same as Radiation.WaggaRadiation.Field
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